// SBML level 2 version 3
// Generated 18-May-2011 08:27:36 (GMT-06:60)
// Generated by MathSBML 2.10.1 [11-Feb-2011]
// Generated using Mathematica Version 8.0 for Microsoft Windows (64-bit) (February 23, 2011)

model WUSactivator()
  // WUSact
  // This model was auto-generated from xlr8r reactions by xlr8r2SBML version 0.4 (24 April 2011) at 18-May-2011 08:27:35 (GMT-06:60)
  // This is a Systems Biology Markup Language (SBML) file, generated by MathSBML 2.10.1 [11-Feb-2011] 18-May-2011 08:27:36 (GMT-06:60). SBML is a form of XML, and most XML files will not display properly in an internet browser. To view the contents of an XML file use the "Page Source" or equivalent button on you browser.

  // Compartments:
  compartment meristem = 1 volume;

  // Species:
  species EmptySet in meristem = 0;
  species L1 in meristem = 1;
  species A in meristem = 0;
  species B in meristem = 0;
  species Y in meristem = 0;
  species W in meristem = 0;

  // Parameters:
  ky = 0.2;
  dy = 0.1;
  Dy = 0.1;
  kD = 3;
  tauw = 10;
  dw = 0.1;
  hw = 0;
  Twy = -20;
  Twa = 0.5;
  a = 0.1;
  b = 0.2;
  beta = 0.1;
  c = 0.1;
  d = 0.01;
  Da = 0.1;
  Db = 1.5;

  // Reactions:
  reaction1: W -> EmptySet; dw*W;
  reaction2: EmptySet + L1 -> L1 + Y; ky*L1;
  reaction3: Y -> EmptySet; dy*Y;
  reaction4: EmptySet -> A; a;
  reaction5: A + Y -> Y; A*d*Y;
  reaction6: A -> EmptySet; A*beta;
  reaction7: 2 A + B -> 3 A; A^2*B*c;
  reaction8: A -> B; A*b;
end
